# OpenSim document version 30000
InverseKinematicsTool Walk_Mkrs.trc:
  results_directory: ./
  constraint_weight: Inf
  accuracy: 1e-5
  marker_file: TRC\Walk_Mkrs.trc
  time_range: 0 5.41
  report_errors: true
  output_motion_file: MOT\Walk_Mkrs.mot
  report_marker_locations: false
  IKTaskSet:
    IKMarkerTask RSHO: apply=true weight=1
    IKMarkerTask LSHO: apply=true weight=1
    IKMarkerTask C7: apply=true weight=1
    IKMarkerTask STRN: apply=true weight=1
    IKMarkerTask RELB: apply=true weight=1
    IKMarkerTask RWRA: apply=true weight=1
    IKMarkerTask RWRB: apply=true weight=1
    IKMarkerTask LELB: apply=true weight=1
    IKMarkerTask LWRA: apply=true weight=1
    IKMarkerTask LWRB: apply=true weight=1
    IKMarkerTask RASI: apply=true weight=1
    IKMarkerTask LASI: apply=true weight=1
    IKMarkerTask RPSI: apply=true weight=1
    IKMarkerTask LPSI: apply=true weight=1
    IKMarkerTask RTHI: apply=true weight=1
    IKMarkerTask RKNE: apply=true weight=1
    IKMarkerTask INRKNE: apply=true weight=1
    IKMarkerTask RTIB: apply=true weight=1
    IKMarkerTask RANK: apply=true weight=1
    IKMarkerTask RHEE: apply=true weight=1
    IKMarkerTask RTOE: apply=true weight=1
    IKMarkerTask RPINKY: apply=true weight=1
    IKMarkerTask LTHI: apply=true weight=1
    IKMarkerTask LKNE: apply=true weight=1
    IKMarkerTask INLKNE: apply=true weight=1
    IKMarkerTask LTIB: apply=true weight=1
    IKMarkerTask LANK: apply=true weight=1
    IKMarkerTask LHEE: apply=true weight=1
    IKMarkerTask LTOE: apply=true weight=1
    IKMarkerTask LPINKY: apply=true weight=1
    IKMarkerTask T10: apply=true weight=1
    IKMarkerTask CLAV: apply=true weight=1
    IKMarkerTask LFIN: apply=true weight=1
    IKMarkerTask RFIN: apply=true weight=1
