# OpenSim document version 30000
MarkerSet:
  Marker RSHO: torso (-0.00798487 0.409879 0.174864)
  Marker LSHO: torso (-0.0159873 0.413318 -0.175891)
  Marker C7: torso (-0.0729803 0.446115 0.00126745)
  Marker STRN: torso (0.0961514 0.18833 -0.00519489)
  Marker RELB: humerus_r (0.00170473 -0.307592 0.0253404)
  Marker RWRA: radius_r (0.0123734 -0.249811 0.0380169)
  Marker RWRB: radius_r (-0.0375092 -0.244335 0.00355916)
  Marker LELB: humerus_l (0.000164398 -0.294844 -0.0250129)
  Marker LWRA: radius_l (0.0128659 -0.253607 -0.0437774)
  Marker LWRB: radius_l (-0.0325495 -0.249699 0.0063343)
  Marker RASI: pelvis (-0.00311156 0.0596099 0.139388)
  Marker LASI: pelvis (-0.000724142 0.0670611 -0.127744)
  Marker RPSI: pelvis (-0.190131 0.0578464 0.0391529)
  Marker LPSI: pelvis (-0.191161 0.0605774 -0.0475807)
  Marker RTHI: femur_r (0.0388716 -0.220404 0.0761524)
  Marker RKNE: femur_r (0.00205025 -0.407883 0.0591124)
  Marker INRKNE: femur_r (-0.013203 -0.408538 -0.0423546)
  Marker RTIB: tibia_r (-0.0163743 -0.184176 0.075656)
  Marker RANK: tibia_r (-0.00336988 -0.42994 0.028233)
  Marker RHEE: calcn_r (-0.0101651 0.0579679 -0.0153651)
  Marker RTOE: calcn_r (0.202123 0.0338985 -0.0244899)
  Marker RPINKY: calcn_r (0.159837 0.013204 0.0389123)
  Marker LTHI: femur_l (0.0550173 -0.21892 -0.08021)
  Marker LKNE: femur_l (0.0042878 -0.402309 -0.0607619)
  Marker INLKNE: femur_l (-0.019712 -0.409175 0.0408049)
  Marker LTIB: tibia_l (-0.023417 -0.201033 -0.0753875)
  Marker LANK: tibia_l (-0.00956231 -0.40676 -0.0298589)
  Marker LHEE: calcn_l (-0.00762544 0.0627998 0.0143572)
  Marker LTOE: calcn_l (0.196612 0.029712 0.0376556)
  Marker LPINKY: calcn_l (0.155435 0.0139572 -0.0489075)
  Marker T10: torso (-0.113854 0.1981 -8.42647e-5)
  Marker CLAV: torso (0.106419 0.216049 -0.00251467) fixed=true
  Marker LFIN: hand_l (-0.0294314 -0.0754664 -0.0156868)
  Marker RFIN: hand_r (-0.0262471 -0.071665 0.0115975)
