# OpenSim document version 30000
ScaleTool Subject:
  mass: 70 [kg]
  height: -1
  age: -1
  GenericModelMaker:
    model_file: Rajagopal2015.osim
    marker_set_file: D:\Google Drive\Share to the world\GitHub\OpenSim\\XML\markers.xml
  ModelScaler:
    apply: true
    scaling_order: measurements
    marker_file: D:\Google Drive\Share to the world\GitHub\OpenSim\\TRC\pose.trc
    time_range: 0 0.01
    preserve_mass_distribution: true
    output_model_file: D:\Google Drive\Share to the world\GitHub\OpenSim\\FullBodyModel\Subject.osim
    output_scale_file: D:\Google Drive\Share to the world\GitHub\OpenSim\\XML\scaleFactorSubject.xml
    MeasurementSet:
      Measurement pelvis: apply=true
        MarkerPair: markers=(RASI LASI)
        BodyScale pelvis: axes=(X Y Z)
      Measurement femur_r: apply=true
        MarkerPair: markers=(RASI RKNE)
        BodyScale femur_r: axes=(X Y Z)
      Measurement tibia_r: apply=true
        MarkerPair: markers=(RKNE RANK)
        BodyScale tibia_r: axes=(X Y Z)
      Measurement patella_r: apply=true
        MarkerPair: markers=(RASI RKNE)
        BodyScale patella_r: axes=(X Y Z)
      Measurement talus_r: apply=true
        MarkerPair: markers=(RTOE RHEE)
        BodyScale talus_r: axes=(X Y Z)
      Measurement calcn_r: apply=true
        MarkerPair: markers=(RTOE RHEE)
        BodyScale calcn_r: axes=(X Y Z)
      Measurement toes_r: apply=true
        MarkerPair: markers=(RTOE RHEE)
        BodyScale toes_r: axes=(X Y Z)
      Measurement femur_l: apply=true
        MarkerPair: markers=(LASI LKNE)
        BodyScale femur_l: axes=(X Y Z)
      Measurement tibia_l: apply=true
        MarkerPair: markers=(LKNE LANK)
        BodyScale tibia_l: axes=(X Y Z)
      Measurement patella_l: apply=true
        MarkerPair: markers=(LASI LKNE)
        BodyScale patella_l: axes=(X Y Z)
      Measurement talus_l: apply=true
        MarkerPair: markers=(LTOE LHEE)
        BodyScale talus_l: axes=(X Y Z)
      Measurement calcn_l: apply=true
        MarkerPair: markers=(LTOE LHEE)
        BodyScale calcn_l: axes=(X Y Z)
      Measurement toes_l: apply=true
        MarkerPair: markers=(LTOE LHEE)
        BodyScale toes_l: axes=(X Y Z)
      Measurement torso: apply=true
        MarkerPair: markers=(RSHO LSHO)
        BodyScale torso: axes=(X Y Z)
      Measurement torso: apply=true
        MarkerPair: markers=(T10 CLAV)
        BodyScale torso: axes=(X Y Z)
      Measurement humerus_r: apply=true
        MarkerPair: markers=(RELB RSHO)
        BodyScale humerus_r: axes=(X Y Z)
      Measurement ulna_r: apply=true
        MarkerPair: markers=(RELB RWRB)
        BodyScale ulna_r: axes=(X Y Z)
      Measurement radius_r: apply=true
        MarkerPair: markers=(RELB RWRA)
        BodyScale radius_r: axes=(X Y Z)
      Measurement hand_r: apply=true
        MarkerPair: markers=(RFIN RWRA)
        BodyScale hand_r: axes=(X Y Z)
      Measurement humerus_l: apply=true
        MarkerPair: markers=(LELB LSHO)
        BodyScale humerus_l: axes=(X Y Z)
      Measurement ulna_l: apply=true
        MarkerPair: markers=(LELB LWRB)
        BodyScale ulna_l: axes=(X Y Z)
      Measurement radius_l: apply=true
        MarkerPair: markers=(LELB LWRA)
        BodyScale radius_l: axes=(X Y Z)
      Measurement hand_l: apply=true
        MarkerPair: markers=(LFIN LWRA)
        BodyScale hand_l: axes=(X Y Z)
  MarkerPlacer:
    apply: true
    marker_file: D:\Google Drive\Share to the world\GitHub\OpenSim\\TRC\pose.trc
    time_range: 0 0.01
    output_model_file: D:\Google Drive\Share to the world\GitHub\OpenSim\\FullBodyModel\SubjectMoved.osim
    output_marker_file: D:\Google Drive\Share to the world\GitHub\OpenSim\\XML\markersMoved.xml
    max_marker_movement: -1
    IKTaskSet:
      IKMarkerTask RSHO: apply=true weight=1
      IKMarkerTask LSHO: apply=true weight=1
      IKMarkerTask C7: apply=true weight=1
      IKMarkerTask STRN: apply=true weight=1
      IKMarkerTask RELB: apply=true weight=1
      IKMarkerTask RWRA: apply=true weight=1
      IKMarkerTask RWRB: apply=true weight=1
      IKMarkerTask LELB: apply=true weight=1
      IKMarkerTask LWRA: apply=true weight=1
      IKMarkerTask LWRB: apply=true weight=1
      IKMarkerTask RASI: apply=true weight=1
      IKMarkerTask LASI: apply=true weight=1
      IKMarkerTask RPSI: apply=true weight=1
      IKMarkerTask LPSI: apply=true weight=1
      IKMarkerTask RTHI: apply=true weight=1
      IKMarkerTask RKNE: apply=true weight=1
      IKMarkerTask INRKNE: apply=true weight=1
      IKMarkerTask RTIB: apply=true weight=1
      IKMarkerTask RANK: apply=true weight=1
      IKMarkerTask RHEE: apply=true weight=1
      IKMarkerTask RTOE: apply=true weight=1
      IKMarkerTask RPINKY: apply=true weight=1
      IKMarkerTask LTHI: apply=true weight=1
      IKMarkerTask LKNE: apply=true weight=1
      IKMarkerTask INLKNE: apply=true weight=1
      IKMarkerTask LTIB: apply=true weight=1
      IKMarkerTask LANK: apply=true weight=1
      IKMarkerTask LHEE: apply=true weight=1
      IKMarkerTask LTOE: apply=true weight=1
      IKMarkerTask LPINKY: apply=true weight=1
      IKMarkerTask T10: apply=true weight=1
      IKMarkerTask CLAV: apply=true weight=1
      IKMarkerTask LFIN: apply=true weight=1
      IKMarkerTask RFIN: apply=true weight=1
